Ararinha
#
# Lab 04 -- CG dianteiro. Geometria do designTool, perfis otimizados do
# Lab 03 (familia roteiro): raiz.dat, centro.dat, ponta.dat.
#
# Asa sem torcao (linha de base; a torcao entra na etapa de otimizacao).
# Alturas em Z deslocadas para tirar as superficies de dentro da fuselagem,
# que ocupa z de -2,348 a +3,732 (eixo em z = 0,692, raio 3,04):
#   asa    -1,20 m  (raiz passa em z = -2,50, abaixo da base da fuselagem)
#   EH     +1,85 m  (raiz em z = +3,85, acima do topo da fuselagem)
#   EV     +0,85 m  (raiz em z = +3,85, acima do topo da fuselagem)
#
# Controles: d1 = aileron, d2 = elevator, d3 = rudder. Design: 1 = it.
#
0.85          # Mach
0 0 0.0       # iYsym iZsym Zsym
368.833 6.8995 60.1518   # Sref Cref Bref
26.0772 0.0 0.0   # Xref Yref Zref (CG dianteiro)
0.01489       # CDp (CD0 do designTool no ponto de projeto)
#----------------------------------------------------------------
SURFACE
Wing
#Nchordwise Cspace Nspanwise Sspace
8 1.0 20 1.0
YDUPLICATE
0.0
ANGLE
0.0


SECTION
#Xle      Yle      Zle      Chord    Ainc
15.9966  0.0000  -2.5000  9.8898  0.0000
AFILE
airfoils/raiz.dat
CLAF
1.0000

SECTION
#Xle      Yle      Zle      Chord    Ainc
18.2882  3.0407  -2.1804  9.1299  0.0000
AFILE
airfoils/raiz.dat
CLAF
1.0000

SECTION
#Xle      Yle      Zle      Chord    Ainc
20.9833  6.6167  -1.8046  8.2362  0.0000
AFILE
airfoils/gerado/eta_0220.dat
CLAF
1.0000

SECTION
#Xle      Yle      Zle      Chord    Ainc
23.2500  9.6243  -1.4884  7.4846  0.0000
AFILE
airfoils/gerado/eta_0320.dat
CLAF
1.0000

SECTION
#Xle      Yle      Zle      Chord    Ainc
25.0180  11.9702  -1.2419  6.8984  0.0000
AFILE
airfoils/gerado/eta_0398.dat
CLAF
1.0000

SECTION
#Xle      Yle      Zle      Chord    Ainc
26.8767  14.4364  -0.9827  6.2820  0.0000
AFILE
airfoils/gerado/eta_0480.dat
CLAF
1.0000

SECTION
#Xle      Yle      Zle      Chord    Ainc
28.6901  16.8425  -0.7298  5.6807  0.0000
AFILE
airfoils/gerado/eta_0560.dat
CLAF
1.0000
CONTROL
#name    gain  Xhinge  XYZhvec      SgnDup
aileron  1.0   0.73    0. 0. 0.    -1.0

SECTION
#Xle      Yle      Zle      Chord    Ainc
31.8634  21.0531  -0.2872  4.6285  0.0000
AFILE
airfoils/gerado/eta_0700.dat
CLAF
1.0000
CONTROL
#name    gain  Xhinge  XYZhvec      SgnDup
aileron  1.0   0.73    0. 0. 0.    -1.0

SECTION
#Xle      Yle      Zle      Chord    Ainc
34.5835  24.6622  0.0921  3.7265  0.0000
AFILE
airfoils/gerado/eta_0820.dat
CLAF
1.0000
CONTROL
#name    gain  Xhinge  XYZhvec      SgnDup
aileron  1.0   0.73    0. 0. 0.    -1.0

SECTION
#Xle      Yle      Zle      Chord    Ainc
36.3968  27.0683  0.3450  3.1252  0.0000
AFILE
airfoils/ponta.dat
CLAF
1.0000
CONTROL
#name    gain  Xhinge  XYZhvec      SgnDup
aileron  1.0   0.73    0. 0. 0.    -1.0

SECTION
#Xle      Yle      Zle      Chord    Ainc
38.6635  30.0759  0.6611  2.3736  0.0000
AFILE
airfoils/ponta.dat
CLAF
1.0000

SURFACE
Horizontal tail
#Nchordwise Cspace Nspanwise Sspace
16 1.0 10 1.0
YDUPLICATE
0.0
ANGLE
0.0

SECTION
#Xle      Yle      Zle      Chord    Ainc
50.1252  0.0000  3.8500  5.1667  0.0000
NACA
0010
CLAF
1.0000
DESIGN
#DName  Wdes
it      1.0
CONTROL
#name    gain  Xhinge  XYZhvec      SgnDup
elevator 1.0   0.70    0. 0. 0.     1.0

SECTION
#Xle      Yle      Zle      Chord    Ainc
57.5222  8.6155  4.1509  2.3250  0.0000
NACA
0010
CLAF
1.0000
DESIGN
#DName  Wdes
it      1.0
CONTROL
#name    gain  Xhinge  XYZhvec      SgnDup
elevator 1.0   0.70    0. 0. 0.     1.0

#----------------------------------------------------------------
SURFACE
Vertical tail
#Nchordwise Cspace Nspanwise Sspace
8 1.0 6 1.0
ANGLE
0.0

SECTION
#Xle      Yle      Zle      Chord    Ainc
51.9366  0.0000  3.8500  9.1453  0.0000
NACA
0010
CLAF
1.0000
CONTROL
#name    gain  Xhinge  XYZhvec      SgnDup
rudder   1.0   0.70    0. 0. 0.     0.0

SECTION
#Xle      Yle      Zle      Chord    Ainc
60.7610  0.0000  13.4525  3.6581  0.0000
NACA
0010
CLAF
1.0000
CONTROL
#name    gain  Xhinge  XYZhvec      SgnDup
rudder   1.0   0.70    0. 0. 0.     0.0

#----------------------------------------------------------------
BODY
Fuselage
# Nbody Bspace
20 1.0

SCALE
# Length Diameter Diameter
61.39 6.08 6.08

BFILE
fuselage_nondim.dat

#--------------------------------------------------
SURFACE
Nacelle
#Nchordwise  Cspace   Nspanwise  Sspace
6            1.0      12          0.0

# Sem COMPONENT: asa, empenagens e nacele usam indice automatico e ficam
# como componentes independentes. Declarar COMPONENT 1 aqui agruparia a
# nacele com a asa (que recebe o indice 1 automaticamente) e alterava o
# Cm da aeronave em 0,006.

YDUPLICATE
0.0

SCALE
# Length, Hor. radius, and Vert. radius
# L_n = 7,3 m e D_n = 4,0 m (raio 2,0) do designTool
7.3   2.0  2.0

TRANSLATE
# x_n = 18,0 (face frontal) e y_n = 11,0 do designTool. O z_n = -3,0
# acompanha o deslocamento da asa (-1,2 m), mantendo a folga de 0,86 m
# entre o topo da nacele e o bordo de ataque da asa.
18.0  11.0  -4.2

SECTION
#Xle   Yle    Zle      Chord   Ainc  Nspanwise  Sspace
 0.00  0.0    1.0       1.0   0.    1          0.

SECTION
#Xle   Yle    Zle      Chord   Ainc  Nspanwise  Sspace
 0.00  0.5    0.866     1.0    0.    1          0.

SECTION
#Xle   Yle    Zle      Chord   Ainc  Nspanwise  Sspace
 0.00  0.866  0.5       1.0    0.    1          0.

SECTION
#Xle   Yle    Zle      Chord   Ainc  Nspanwise  Sspace
 0.00  1.0    0.0       1.0    0.    1          0.

SECTION
#Xle   Yle    Zle      Chord   Ainc  Nspanwise  Sspace
 0.00  0.866 -0.5       1.0    0.    1          0.

SECTION
#Xle   Yle    Zle      Chord   Ainc  Nspanwise  Sspace
 0.00  0.5   -0.866     1.0    0.    1          0.

SECTION
#Xle   Yle    Zle      Chord   Ainc  Nspanwise  Sspace
 0.00  0.0   -1.0       1.0    0.    1          0.

SECTION
#Xle   Yle    Zle      Chord   Ainc  Nspanwise  Sspace
 0.00 -0.5   -0.866     1.0    0.    1          0.

SECTION
#Xle   Yle    Zle      Chord   Ainc  Nspanwise  Sspace
 0.00 -0.866 -0.5       1.0    0.    1          0.

SECTION
#Xle   Yle    Zle      Chord   Ainc  Nspanwise  Sspace
 0.00 -1.0    0.0       1.0    0.    1          0.

SECTION
#Xle   Yle    Zle      Chord   Ainc  Nspanwise  Sspace
 0.00 -0.866  0.5       1.0    0.    1          0.

SECTION
#Xle   Yle    Zle      Chord   Ainc  Nspanwise  Sspace
 0.00 -0.5    0.866     1.0    0.    1          0.

SECTION
#Xle   Yle    Zle      Chord   Ainc  Nspanwise  Sspace
 0.00  0.0    1.0       1.0    0.    1          0.
